# OpenSim document version 30000
ScaleTool Patient4_scaled:
  mass: 80.5 [kg]
  height: -1
  age: -1
  ModelScaler:
    apply: true
    scaling_order: measurements
    marker_file: Patient4_Static01_reordered.trc
    time_range: 0 9.09
    preserve_mass_distribution: true
    MeasurementSet:
      Measurement Torso Width: apply=true
        MarkerPair: markers=(L.ASIS R.ASIS)
        BodyScale torso: axes=Z
      Measurement Torso Height: apply=true
        MarkerPair: markers=(Sacral Neck)
        BodyScale torso: axes=Y
      Measurement Torso Depth: apply=true
        MarkerPair: markers=(Chest Neck)
        BodyScale torso: axes=X
      Measurement Upper Arm: apply=true
        MarkerPair: markers=(R.Shoulder R.Elbow)
        MarkerPair: markers=(L.Shoulder L.Elbow)
        BodyScale humerus_r: axes=(X Y Z)
        BodyScale humerus_l: axes=(X Y Z)
      Measurement Fore Arm: apply=true
        MarkerPair: markers=(R.Elbow R.Wrist)
        MarkerPair: markers=(L.Elbow L.Wrist)
        BodyScale ulna_r: axes=(X Y Z)
        BodyScale radius_r: axes=(X Y Z)
        BodyScale ulna_l: axes=(X Y Z)
        BodyScale radius_l: axes=(X Y Z)
      Measurement Pelvis Width: apply=true
        MarkerPair: markers=(L.ASIS R.ASIS)
        BodyScale pelvis: axes=Z
      Measurement Pelvis Depth: apply=true
        MarkerPair: markers=(L.ASIS Sacral)
        BodyScale pelvis: axes=X
      Measurement Thigh: apply=true
        MarkerPair: markers=(L.ASIS L.Knee.Lateral)
        MarkerPair: markers=(R.ASIS R.Knee.Lateral)
        BodyScale femur_r: axes=(X Y Z)
        BodyScale femur_l: axes=(X Y Z)
      Measurement Shank: apply=true
        MarkerPair: markers=(L.Knee.Medial L.Ankle.Lateral)
        MarkerPair: markers=(R.Knee.Lateral R.Ankle.Lateral)
        BodyScale tibia_r: axes=(X Y Z)
        BodyScale tibia_l: axes=(X Y Z)
      Measurement Foot: apply=true
        MarkerPair: markers=(L.Heel L.Toe)
        MarkerPair: markers=(R.Heel R.Toe)
        BodyScale talus_r: axes=(X Y Z)
        BodyScale calcn_r: axes=(X Y Z)
        BodyScale toes_r: axes=(X Y Z)
        BodyScale talus_l: axes=(X Y Z)
        BodyScale calcn_l: axes=(X Y Z)
        BodyScale toes_l: axes=(X Y Z)
  MarkerPlacer:
    apply: true
    marker_file: Patient4_Static01_reordered.trc
    time_range: 0 9.09
    max_marker_movement: -1
    IKTaskSet:
      IKMarkerTask R.Shoulder: apply=true weight=1
      IKMarkerTask L.Shoulder: apply=true weight=1
      IKMarkerTask Neck: apply=false weight=1
      IKMarkerTask Lumbar: apply=false weight=1
      IKMarkerTask Chest: apply=false weight=1
      IKMarkerTask R.Elbow: apply=true weight=1
      IKMarkerTask R.Wrist: apply=true weight=1
      IKMarkerTask L.Elbow: apply=true weight=1
      IKMarkerTask L.Wrist: apply=true weight=1
      IKMarkerTask R.ASIS: apply=true weight=2
      IKMarkerTask L.ASIS: apply=true weight=2
      IKMarkerTask Sacral: apply=true weight=1
      IKMarkerTask R.Thigh.Superior: apply=false weight=1
      IKMarkerTask R.Thigh.Inferior: apply=false weight=1
      IKMarkerTask R.Thigh.Lateral: apply=false weight=1
      IKMarkerTask R.Knee.Lateral: apply=true weight=1
      IKMarkerTask R.Knee.Medial: apply=true weight=1
      IKMarkerTask R.Shank.Superior: apply=false weight=1
      IKMarkerTask R.Shank.Inferior: apply=false weight=1
      IKMarkerTask R.Shank.Lateral: apply=false weight=1
      IKMarkerTask R.Ankle.Lateral: apply=true weight=1
      IKMarkerTask R.Ankle.Medial: apply=true weight=1
      IKMarkerTask R.Heel: apply=true weight=100
      IKMarkerTask R.Midfoot.Superior: apply=false weight=1
      IKMarkerTask R.Midfoot.Lateral: apply=false weight=1
      IKMarkerTask R.Toe.Lateral: apply=false weight=1
      IKMarkerTask R.Toe: apply=true weight=100
      IKMarkerTask R.Toe.Medial: apply=false weight=1
      IKMarkerTask L.Thigh.Superior: apply=false weight=1
      IKMarkerTask L.Thigh.Inferior: apply=false weight=1
      IKMarkerTask L.Thigh.Lateral: apply=false weight=1
      IKMarkerTask L.Knee.Lateral: apply=true weight=1
      IKMarkerTask L.Knee.Medial: apply=true weight=1
      IKMarkerTask L.Shank.Superior: apply=false weight=1
      IKMarkerTask L.Shank.Lateral: apply=false weight=1
      IKMarkerTask L.Shank.Inferior: apply=false weight=1
      IKMarkerTask L.Ankle.Lateral: apply=true weight=1
      IKMarkerTask L.Ankle.Medial: apply=true weight=1
      IKMarkerTask L.Heel: apply=true weight=100
      IKMarkerTask L.Midfoot.Superior: apply=false weight=1
      IKMarkerTask L.Midfoot.Lateral: apply=false weight=1
      IKMarkerTask L.Toe.Lateral: apply=false weight=1
      IKMarkerTask L.Toe: apply=true weight=100
      IKMarkerTask L.Toe.Medial: apply=false weight=1
