# OpenSim document version 30000
InverseKinemtaticsTool IKTool:
  IKTaskSet IKSet:
    IKMarkerTask R.ASIS: apply=true weight=1
    IKMarkerTask L.ASIS: apply=true weight=1
    IKMarkerTask Sacral: apply=true weight=1
    IKMarkerTask R.Thigh.Superior: apply=true weight=0.5
    IKMarkerTask R.Thigh.Inferior: apply=true weight=0.5
    IKMarkerTask R.Thigh.Lateral: apply=true weight=0.5
    IKMarkerTask L.Thigh.Superior: apply=true weight=0.5
    IKMarkerTask L.Thigh.Inferior: apply=true weight=0.5
    IKMarkerTask L.Thigh.Lateral: apply=true weight=0.5
    IKMarkerTask R.Shank.Superior: apply=true weight=1
    IKMarkerTask R.Shank.Inferior: apply=true weight=1
    IKMarkerTask R.Shank.Lateral: apply=true weight=1
    IKMarkerTask L.Shank.Superior: apply=true weight=1
    IKMarkerTask L.Shank.Inferior: apply=true weight=1
    IKMarkerTask L.Shank.Lateral: apply=true weight=1
    IKMarkerTask R.Heel: apply=true weight=10
    IKMarkerTask R.Midfoot.Superior: apply=true weight=10
    IKMarkerTask R.Midfoot.Lateral: apply=true weight=10
    IKMarkerTask R.Toe: apply=true weight=10
    IKMarkerTask L.Heel: apply=true weight=10
    IKMarkerTask L.Midfoot.Superior: apply=true weight=10
    IKMarkerTask L.Midfoot.Lateral: apply=true weight=10
    IKMarkerTask L.Toe: apply=true weight=10
    IKMarkerTask Chest: apply=true weight=0.5
    IKMarkerTask Neck: apply=true weight=0.5
    IKMarkerTask R.Shoulder: apply=true weight=1
    IKMarkerTask L.Shoulder: apply=true weight=1
    IKMarkerTask R.Elbow: apply=true weight=0.5
    IKMarkerTask R.Wrist: apply=true weight=0.5
    IKMarkerTask L.Elbow: apply=true weight=0.5
    IKMarkerTask L.Wrist: apply=true weight=0.5
    # End objects
  # End IKTaskSet
